*Heading
 E2_211_300x300_00_AllEdges_ins_Aligned
** Job name: E2_211 Model name: Model-1
** Generated by: Abaqus/CAE 2017
*Preprint, echo=NO, model=NO, history=NO, contact=NO
**
** PARTS
**
*Part, name=Part-1
*Node
      1,  -5.47667694,   1.12071931,        0.147
      2,  -4.82962894,  -1.29409528,        0.147
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*Element, type=DC3D8E
   1,    4,    3,    2,    1, 4948, 4947, 4946, 4945
   2,    7,    6,    5,    3, 4951, 4950, 4949, 4947
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*Element, type=DC3D6E
4780, 4286, 4287, 4542, 9230, 9231, 9486
4781, 4289, 4290, 4544, 9233, 9234, 9488
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*Nset, nset=bnset
 4286, 4289, 4293, 4297, 4300, 4304
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*Elset, elset=eset, generate
    1,  4839,     1
*Nset, nset=nset, generate
    1,  9888,     1
*Elset, elset=_lset_S1, internal
  1,  2,  3,  4,  5,  8,  9, 10, 11, 12, 22, 25, 26, 27, 28, 49
*Surface, type=ELEMENT, name=lset
_lset_S1, S1
*Orientation, name=Ori-1
1., 0., 0., 0., 1., 0.
3, 0.
** Section: Section-1
*Solid Section, elset=eset, orientation=Ori-1, material=Material-CI
,
*End Part
**
**
** ASSEMBLY
**
*Assembly, name=Assembly
**
*Instance, name=Part-1-1, part=Part-1
*End Instance
**
*End Assembly
*Amplitude, name=Amp-1
             0.,              0.,           5e-07,           4000.,         4.5e-06,          36000.,           5e-06,          40000.
       2.05e-05,          20000.,         3.6e-05,              0.
**
** MATERIALS
**
*Material, name=Material-CI
*Conductivity, dependencies=1, type=ORTHO
     0.008,   0.00067,   0.00067,       25.,        1.
  0.002608,   0.00018,   0.00018,      500.,        1.
  0.001736,    0.0001,    0.0001,     1000.,        1.
  0.001736,    0.0001,    0.0001,     3316.,        1.
  0.001736,    0.0001,    0.0001,     3334.,        1.
    0.0005,    0.0005,    0.0005,     3335.,        1.
  0.001015,  0.001015,  0.001015,     7000.,        1.
 3.351e-05, 3.351e-05, 3.351e-05,       25.,        2.
 0.0001003, 0.0001003, 0.0001003,      500.,        2.
 0.0001707, 0.0001707, 0.0001707,     1000.,        2.
    0.0005,    0.0005,    0.0005,     3316.,        2.
    0.0005,    0.0005,    0.0005,     3334.,        2.
    0.0005,    0.0005,    0.0005,     3335.,        2.
  0.001015,  0.001015,  0.001015,     7000.,        2.
*Density
 1.52e-06,  25.
 1.52e-06, 500.
  1.1e-06, 800.
  1.1e-06,3316.
 1.11e-09,3334.
 1.11e-09,3335.
*Depvar
      3,
*Electrical Conductivity, dependencies=1, type=ORTHO
 35.97, 0.001145, 1.79e-06,      25.,       1.
 35.97, 0.001145, 1.79e-06,     500.,       1.
 35.97, 0.001145, 1.79e-06,     800.,       1.
 35.97, 0.001145, 1.79e-06,    3316.,       1.
    1.,       1.,    1e+06,    3334.,       1.
    1.,       1.,    1e+06,    3335.,       1.
    1.,       1.,    1e+06,      25.,       2.
    1.,       1.,    1e+06,     334.,       2.
    1.,       1.,    1e+06,     600.,       2.
    1.,       1.,    1e+06,    3316.,       2.
*Heat Generation
*Joule Heat Fraction
        0.92,
*Latent Heat
 4.8e+06, 500., 800.
 4.3e+07,3316.,3334.
*Specific Heat, dependencies=1
1065.,  25.,   1.
2100., 500.,   1.
2100., 800.,   1.
1700., 810.,   1.
2500.,3316.,   1.
5875.,3334.,   1.
5875.,3335.,   1.
5875.,  25.,   2.
5875., 343.,   2.
5875., 500.,   2.
5875., 510.,   2.
5875.,3316.,   2.
5874.,3334.,   2.
5875.,3335.,   2.
*User Defined Field
**
** PREDEFINED FIELDS
**
** Name: Predefined Field-1   Type: Temperature
*Initial Conditions, type=TEMPERATURE
Part-1-1.nset, 25.
** ----------------------------------------------------------------
**
** STEP: Step-1
**
*Step, name=Step-1, nlgeom=NO, inc=10000000, unsymm=NO
instant_loading
*Coupled Thermal-electrical, end=PERIOD, deltmx=400.
1e-10, 2e-08, 3.5e-30, 2e-08,
*Solution Technique, type=SEPARATED
**
** BOUNDARY CONDITIONS
**
** Name: BC-1 Type: Electric potential
*Boundary
Part-1-1.bnset, 9, 9
**
** LOADS
**
** Name: Load-1   Type: Surface current Using Field: AnalyticalField-1
*Decurrent
Part-1-1.1,CS1, 0.0127324
Part-1-1.2,CS1, 0.0127324
Part-1-1.3,CS1, 0.0127324
Part-1-1.4,CS1, 0.0127324
Part-1-1.5,CS1, 0.
Part-1-1.8,CS1, 0.0127324
Part-1-1.9,CS1, 0.0127324
Part-1-1.10,CS1, 0.0127324
Part-1-1.11,CS1, 0.0127324
Part-1-1.12,CS1, 0.0127324
Part-1-1.22,CS1, 0.
Part-1-1.25,CS1, 0.0127324
Part-1-1.26,CS1, 0.0127324
Part-1-1.27,CS1, 0.0127324
Part-1-1.28,CS1, 0.
Part-1-1.49,CS1, 0.
**
** CONTROLS
**
*Controls, reset
*Controls, parameters=time incrementation
, , , , , , , 30, , ,
*Controls, parameters=field, field=temperature
0.8, 0.8, , , 0.8, , ,
*Controls, parameters=field, field=electrical potential
0.8, 0.8, , , 0.8, , ,
**
** OUTPUT REQUESTS
**
*Restart, write, frequency=0
**
** FIELD OUTPUT: F-Output-1
**
*Output, field
*Node Output
EPOT, NT, RECUR, RFL
*Element Output, directions=YES
ECD, EPG, HFL, NCURS
*Contact Output
ECD,
*Output, history, frequency=0
*End Step
